# bulk water

units           metal
boundary        p p p
atom_style      atomic

#processors   grid twolevel 4 2 1 2

package omp 12

neighbor        2.0 bin
neigh_modify    every 50 delay 0 check no

read_data	    water_192.lmp
change_box all ortho
mass 		    1 16
mass		    2 2

replicate       3 3 3 bbox

pair_style	    deepmd/omp 6 0.50 2 46 92 pb_data_water_v0001.dat

pair_coeff	    * *

velocity        all create 330.0 23456789 loop local

# fix             1 all nve
fix             1 all nvt temp 330.0 330.0 0.5
# fix             2 all langevin 330 330 0.001 48279

timestep        0.0005
thermo_style    custom step pe ke etotal temp press vol
thermo          50
# dump		    1 all custom 100 water.dump id type x y z

compute rdf all rdf 100 1 1 1 2 2 2
fix 3 all ave/time 100 1 100 c_rdf[*] file h2o.rdf.fp16_v0001 mode vector

run             10000
# run             1
# run             999
